λ := 3*10^-4
t := 10000
p(t) := e^(-λ*t)
p(5000) = 0.22313
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p(t) = 0.0497871
t := 0, 1 .. 10000
n := 3
P1(t, n) := p(t)^n
P2(t, n) := 1 - (1 - p(t)^n)
P3(t, n, m) := 1 - (1 - p(t)^m)^n
P4(t, n, m) := (1 - (1 - p(t))^m)^n
m := 4
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P
P1234(t) := p(t)^4
P56(t) := p(t)^2
P123456(t) := 1 - (1 - P1234(t))*(1 - P56(t))
P89(t) := p(t)^2
P1234567(t) := p(t)*(1 - (1 - P1234(t))*(1 - P56(t)))
P123456789(t) := 1 - (1 - P89(t))*(1 - P1234567(t))
P1011(t) := p(t)^2
P1234567891011(t) := 1 - (1 - P1011(t))*(1 - P123456789(t))
P1213(t) := 1 - (1 - p(t))*(1 - p(t))
P12345678910111213(t) := P1213(t)*P1234567891011(t)
Pc(t) := P12345678910111213(t)*p(t)
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