λ := 3*10^-4
t := 10000
p(t) := e^(-λ*t)
p(5000) = 0.22313
p(t) = 0.0497871
t := 0, 1 .. 10000
Pl*Pa^2 := 0.95  # error: Здесь необходимо указать имя.
n := 3
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P1(t, n) := p(t)^n
P2(t, n) := 1 - (1 - p(t)^n)
P3(t, n, m) := 1 - (1 - p(t)^m)^n
P4(t, n, m) := (1 - (1 - p(t))^m)^n
m := 4
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P23(t) := p(t)^2
P1011(t) := p(t)^2
P0(t) := 1 - (1 - p(t))*(1 - p(t))
P456789(t) := P0(t)*(1 - (1 - p(t))^2)^2
P234567891011(t) := 1 - (1 - P456789(t))*(1 - P23(t))*(1 - P1011(t))
Panswer(t) := p(t)*P234567891011(t)
