C0 := 5
C1 := -6
C2 := -7
C3 := 0.1
b := 10^-4
# C0 - прибыль за успешную отправку
B(L) := (1 - b)^L
# С1 - штраф за доставку с задержкой
n := 10
# С2 - штраф за потерю
v := 0.1
# С3 - плата за канал
P(λ, n, t) := 1 - λ*v/n*e^((λ/n - 1/v)*t)
P(λ, n, t) := 1 - λ*v/n*e^((λ/n - 1/v)*t)
L := 1000
S(λ, n, t) := λ*(P(λ, n, t)*B(L)*C0 + (1 - P(λ, n, t)*B(L)*C1 + (1 - B(L))*C2)) - n*C3
t := 0.3
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# k - количество одновременно передаваемых пакетов
B(k) := 1 - (1 - (1 - b)^L)^k
C1 := -5
P(λ, k, t) := 1 - k*λ*v/n*e^((k*λ/n - 1/v)*t)
C2 := -10
S(λ, k, t) := λ*(P(λ, k, t)*B(k)*C0 + (1 - P(λ, k, t)*B(k)*C1 + (1 - B(k))*C2)) - n*C3
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