n := 5
μ1 := 0.3
μ2 := 1
λ1 := 0.0001
λ2 := 0.0002
λc := (2*λ1 + λ2)/3
μc := (2*μ1 + μ2)/3
λ := λc
μ := μc
R(i, n) := (λ/μ)^i*n!/(n - 1)!/sum((λ/μ)^i*n!/(n - 1)!, i = 0 .. n)
γ := (sum(i*R(i, n), i = 0 .. n)*1/μc)^-1
i
Given
P0 + P1 + P2 + P4 + P5 + P6 + P7 + P8 == 1
-P0*2*λ1 - P0*λ2 + P5*μ2 + P8*μ1 == 0
-P1*λ1 - λ2*P1 + P0*2*λ1 == 0
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-P2*γ + λ1*P1 == 0
-P7*μ1 + P8*λ1 + P2*γ == 0
-P3*γ + P0*λ2 == 0
-P5*μ2 + P3*γ == 0
-P4*γ + P1*λ2 == 0
γ*P4 + λ2*P8 - μ1*P6 == 0
P := Find(P0, P1, P2, P3, P4, P5, P6, P7, P8) → [0.599448234118; 0.399632156079; 1.87374416766e-8; 5.62123250298e-8; 3.74748833532e-8; 0.000119889646824; 0.000266687858823; 0.000133343929412; 0.000399632156079]
k := P[0] + P[1] + P[8]
k = 0.99948
K := sum(combin(n, i)*k^i*(1 - k)^(n - i), i = 1 .. n)
K = 1
