λ1 := 10^-4
λ2 := 10^-4
μ1 := 1
μ2 := 1
Given
-(λ1 + λ2)*P11 + μ1*P01 + μ2*P10 == 0
P11 + P01 + P10 + P00 == 1
-(μ1 + λ2)*P01 + λ1*P11 == 0
-μ1*P00 + λ2*P01 + λ1*P10 == 0
Find(P11, P01, P10, P00) → [50000000/50010001; 50000000/500150020001; 50010000/500150020001; 1/50010001]
n := 4
λ := 0.0001
μ := 1
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Given
-4*λ*P4 + μ*P31 == 0
-3*λ*P3 + 4*λ*P4 == 0
-2*λ*P2 + 3*λ*P3 == 0
-λ*P1 + 2*λ*P2 == 0
-μ*P0 + P1*λ + P11*λ == 0
-μ*P11 - λ*P11 + μ*P0 + 2*λ*P21 == 0
-μ*P21 - 2*λ*P21 + 3*λ*P31 + μ*P11 == 0
-μ*P31 - 3*λ*P31 + μ*P21 == 0
P0 + P1 + P2 + P3 + P4 + P11 + P21 + P31 == 1
A := Find(P4, P3, P2, P1, P0, P11, P21, P31) → [0.119976960968; 0.15996928129; 0.239953921935; 0.479907843871; 4.79955844256e-5; 4.80003854234e-5; 4.80051816224e-5; 4.79907843871e-5]
K := A[0] + A[1] + A[2] + A[3] + A[5] + A[6] + A[7]
K = 0.999952
