λ := 0.00001, 0.00002 .. 0.0001
μ := 1
Given
-2*λ*P0 + μ*P1 == 0
-μ*P2 + λ*P1 == 0
P0 + P1 + P2 == 1
Find(P0, P1, P2) → [
    1/(2.0*(1/100000, 1/50000 .. 1/10000)^2 + 2.0*(1/100000, 1/50000 .. 1/10000) + 1.0);
    2.0*(1/100000, 1/50000 .. 1/10000)/(2.0*(1/100000, 1/50000 .. 1/10000)^2 + 2.0*(1/100000, 1/50000 .. 1/10000) + 1.0);
    2.0*(1/100000, 1/50000 .. 1/10000)^2/(2.0*(1/100000, 1/50000 .. 1/10000)^2 + 2.0*(1/100000, 1/50000 .. 1/10000) + 1.0)
]
K(λ) := 1/(2*λ^2 + 2*λ + 1) + 2*λ/(2*λ^2 + 2*λ + 1)
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S := 1
C(λ) := (2*λ*1/(2*λ^2 + 2*λ + 1) + λ*1/(2*λ^2 + 2*λ + 1))*S
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S := 1
a := 0.5
Given
-2*a*λ1*R0 - 2*(1 - a)*λ1*R0 + μ*R3 == 0
-a*λ1*R1 - (1 - a)*λ1*R1 - (1 - a)*λ1*R1 + 2*a*λ1*R0 + μ*R5 + μ*R7 == 0
R0 + R1 + R2 + R3 + R4 + R5 + R6 + R7 + R8 == 1
-(1 - a)*λ1*R2 - a*λ1*R2 - a*λ1*R2 + μ*R6 + 2*(1 - a)*λ1*R0 == 0
-μ*R5 + a*λ1*R1 == 0
-μ*R6 + (1 - a)*λ1*R2 + μ*R8 == 0
-μ*R7 + a*λ1*R4 + a*λ1*R3 == 0
-μ*R8 + (1 - a)*λ1*R3 + (1 - a)*λ1*R4 == 0
-(1 - a)*λ1*R4 - a*λ1*R4 + (1 - a)*λ1*R1 + a*λ1*R2 == 0
Find(R0, R1, R2, R3, R4, R5, R6, R7, R8) → [
    1/(8.0*λ1^2 + 13.0*λ1 + 7.0);
    (2.0*λ1 + 2.0)/(8.0*λ1^2 + 13.0*λ1 + 7.0);
    (2.0*λ1 + 2.0)/(8.0*λ1^2 + 13.0*λ1 + 7.0);
    2.0*λ1/(8.0*λ1^2 + 13.0*λ1 + 7.0);
    (2.0*λ1 + 2.0)/(8.0*λ1^2 + 13.0*λ1 + 7.0);
    (λ1^2 + λ1)/(8.0*λ1^2 + 13.0*λ1 + 7.0);
    (3.0*λ1^2 + 2.0*λ1)/(8.0*λ1^2 + 13.0*λ1 + 7.0);
    (2.0*λ1^2 + λ1)/(8.0*λ1^2 + 13.0*λ1 + 7.0);
    (2.0*λ1^2 + λ1)/(8.0*λ1^2 + 13.0*λ1 + 7.0)
]
